# OpenSim document version 40000
InverseKinematicsTool:
  time_range: 0 100
  IKTaskSet:
    IKMarkerTask ij: apply=true weight=1
    IKMarkerTask ai: apply=true weight=0.5
    IKMarkerTask ts: apply=true weight=0.5
    IKMarkerTask aa: apply=true weight=0.5
    IKMarkerTask gu: apply=true weight=1
    IKMarkerTask EpL: apply=true weight=1
    IKMarkerTask centelbow: apply=true weight=1
    IKMarkerTask centijc7: apply=true weight=1
    IKMarkerTask centpxt8: apply=true weight=1
    IKCoordinateTask [values shared by the 8 below unless stated]: apply=true weight=0 value_type=manual_value value=0
    IKCoordinateTask scapula_abduction
    IKCoordinateTask scapula_elevation
    IKCoordinateTask scapula_upward_rot
    IKCoordinateTask scapula_winging
    IKCoordinateTask Lscapula_abduction
    IKCoordinateTask Lscapula_elevation
    IKCoordinateTask Lscapula_upward_rot
    IKCoordinateTask Lscapula_winging
