# OpenSim document version 40000
InverseKinematicsTool:
  time_range: 0 4.1
  output_motion_file: ../../../Model Validation - Orthoload/rmr-solver-1.0 - original/rmr-solver-1.0/Personal_Results/S8R/With GH Constraint/New Transformation/Circle/transformed_MSabdkg1.mot
  marker_file: ../../../Model Validation - Orthoload/rmr-solver-1.0 - original/rmr-solver-1.0/ExperimentalData/S8R/trc/transformed_MSabdkg1.trc
  report_marker_locations: true
  IKTaskSet:
    IKMarkerTask IJ: apply=true weight=10
    IKMarkerTask C7: apply=false weight=10
    IKMarkerTask T8: apply=true weight=10
    IKMarkerTask PX: apply=false weight=10
    IKMarkerTask SC: apply=false weight=1
    IKMarkerTask AI: apply=false weight=10
    IKMarkerTask TS: apply=true weight=10
    IKMarkerTask AA: apply=false weight=10
    IKMarkerTask GH: apply=true weight=10
    IKMarkerTask EL: apply=true weight=10
    IKMarkerTask EM: apply=true weight=10
    IKMarkerTask RS2: apply=true weight=10
    IKMarkerTask US2: apply=true weight=10
