# OpenSim document version 40000
ScaleTool ThoracoscapularShoulderModel-scaled:
  mass: 30 [kg]
  height: -1
  age: -1
  ModelScaler:
    apply: true
    scaling_order: measurements manualScale
    marker_file: C:/Users/ibrah/OneDrive - KTH/My Github Repositories/customized-rmr-solver/OpenSim Models/../ExperimentalData/S8R/trc/transformed_MSabdkg1.trc
    time_range: 2.2 2.3
    preserve_mass_distribution: false
    MeasurementSet:
      Measurement ThoraxY: apply=true
        MarkerPair: markers=(T8 C7)
        BodyScale thorax: axes=(Y Z)
      Measurement HumerusY: apply=true
        MarkerPair: markers=(EL GH)
        BodyScale humerus: axes=Y
      Measurement ArmY: apply=true
        MarkerPair: markers=(RS2 EL)
        BodyScale ulna: axes=Y
        BodyScale radius: axes=Y
      Measurement ThoraxX: apply=true
        MarkerPair: markers=(PX T8)
        BodyScale thorax: axes=X
      Measurement HumZ: apply=false
        MarkerPair: markers=(EM EL)
      Measurement ThoraxX: apply=false
        MarkerPair: markers=(T8 IJ)
      Measurement ScapulaY: apply=false
        MarkerPair: markers=(AI TS)
      Measurement ScapulaZ: apply=true
        MarkerPair: markers=(AI AA)
        BodyScale scapula: axes=(X Y Z)
    ScaleSet:
      Scale: scales=(1.1 1.1 1.1) segment=clavicle apply=true
      Scale: scales=(1.1 1.2 1.1) segment=scapula apply=false
      Scale: scales=(1 1.2 1) segment=humerus apply=false
      Scale: scales=(1 1.2 1) segment=ulna apply=false
      Scale: scales=(1 1.2 1) segment=radius apply=false
  MarkerPlacer:
    apply: true
    marker_file: C:/Users/ibrah/OneDrive - KTH/My Github Repositories/customized-rmr-solver/OpenSim Models/../ExperimentalData/S8R/trc/transformed_MSabdkg1.trc
    time_range: 2.2 2.3
    max_marker_movement: -1
    IKTaskSet:
      IKMarkerTask IJ: apply=true weight=10
      IKMarkerTask C7: apply=true weight=1
      IKMarkerTask T8: apply=true weight=1
      IKMarkerTask PX: apply=false weight=1
      IKMarkerTask ClavicleMassCenter: apply=false weight=1
      IKMarkerTask acc: apply=false weight=1
      IKMarkerTask SC: apply=true weight=1
      IKMarkerTask ScapulaMassCenter: apply=false weight=1
      IKMarkerTask ScapulaThoracicContactPt: apply=false weight=1
      IKMarkerTask AC: apply=false weight=1
      IKMarkerTask AI: apply=false weight=1
      IKMarkerTask TS: apply=true weight=10
      IKMarkerTask AA: apply=true weight=10
      IKMarkerTask HumerusMassCenter: apply=false weight=1
      IKMarkerTask GH: apply=false weight=10
      IKMarkerTask EL: apply=true weight=10
      IKMarkerTask EM: apply=true weight=10
      IKMarkerTask centelbow: apply=false weight=1
      IKMarkerTask centijc7: apply=false weight=1
      IKMarkerTask centpxt8: apply=false weight=1
      IKMarkerTask ijc: apply=false weight=1
      IKMarkerTask RS2: apply=true weight=10
      IKMarkerTask US2: apply=true weight=10
      IKMarkerTask Glenoid_Center: apply=false weight=1
      IKMarkerTask HumHead_Center: apply=false weight=1
      IKMarkerTask Glenoid_Edge: apply=false weight=1
