# OpenSim document version 40000
InverseKinematicsTool:
  time_range: 0 4.1
  output_motion_file: C:\Users\ibrah\OneDrive - KTH\Model Validation - Orthoload\rmr-solver-1.0 - original\rmr-solver-1.0\Personal_Results\S8R\With GH Constraint\New Transformation\Conditional w=10\transformed_MSabdkg1.mot
  marker_file: C:\Users\ibrah\OneDrive - KTH\Model Validation - Orthoload\rmr-solver-1.0 - original\rmr-solver-1.0\ExperimentalData\S8R\trc\transformed_MSabdkg1.trc
  report_marker_locations: true
  IKTaskSet:
    IKMarkerTask IJ: apply=true weight=10
    IKMarkerTask C7: apply=false weight=10
    IKMarkerTask T8: apply=true weight=10
    IKMarkerTask PX: apply=true weight=10
    IKMarkerTask SC: apply=false weight=1
    IKMarkerTask AI: apply=true weight=10
    IKMarkerTask TS: apply=true weight=10
    IKMarkerTask AA: apply=true weight=10
    IKMarkerTask GH: apply=false weight=10
    IKMarkerTask EL: apply=true weight=10
    IKMarkerTask EM: apply=true weight=10
    IKMarkerTask centelbow: apply=false weight=1
    IKMarkerTask centijc7: apply=false weight=1
    IKMarkerTask centpxt8: apply=false weight=1
    IKMarkerTask ijc: apply=false weight=1
    IKMarkerTask US2: apply=true weight=10
    IKMarkerTask RS2: apply=true weight=10
