# OpenSim document version 40000
InverseKinematicsTool:
  time_range: 0 4.5
  output_motion_file: C:\Users\ibrah\OneDrive - KTH\My Github Repositories\customized-rmr-solver\Personal_Results\S8R\With Scaling\Polynomial Tight\transformed_MSffkg1.mot
  marker_file: C:\Users\ibrah\OneDrive - KTH\My Github Repositories\customized-rmr-solver\ExperimentalData\S8R\trc\transformed_MSffkg1.trc
  report_marker_locations: true
  IKTaskSet:
    IKMarkerTask IJ: apply=true weight=10
    IKMarkerTask C7: apply=true weight=10
    IKMarkerTask T8: apply=true weight=10
    IKMarkerTask PX: apply=false weight=10
    IKMarkerTask SC: apply=false weight=1
    IKMarkerTask AI: apply=false weight=10
    IKMarkerTask TS: apply=true weight=10
    IKMarkerTask AA: apply=true weight=10
    IKMarkerTask GH: apply=true weight=20
    IKMarkerTask EL: apply=true weight=10
    IKMarkerTask EM: apply=true weight=10
    IKMarkerTask RS2: apply=true weight=10
    IKMarkerTask US2: apply=true weight=10
