# OpenSim document version 40000
InverseKinematicsTool:
  time_range: 0 2.94
  output_motion_file: C:\Users\ibrah\OneDrive - KTH\PhD-Scripts\RMR Solver\rmr-solver\Results\Upright_Lateral_Raise_90.mot
  marker_file: C:\Users\ibrah\OneDrive - KTH\PhD-Scripts\RMR Solver\rmr-solver\ExperimentalData\Upright_Lateral_Raise_90.trc
  report_marker_locations: true
  IKTaskSet:
    IKMarkerTask IJ: apply=true weight=1
    IKMarkerTask C7: apply=true weight=1
    IKMarkerTask T10: apply=true weight=1
    IKMarkerTask PX: apply=true weight=1
    IKMarkerTask RASI: apply=true weight=1
    IKMarkerTask LASI: apply=true weight=1
    IKMarkerTask RPSI: apply=true weight=1
    IKMarkerTask LPSI: apply=true weight=1
    IKMarkerTask RClav_SC: apply=true weight=1
    IKMarkerTask RClav_M: apply=true weight=1
    IKMarkerTask RClav_AC: apply=true weight=1
    IKMarkerTask LClav_SC: apply=true weight=1
    IKMarkerTask LClav_M: apply=true weight=1
    IKMarkerTask LClav_AC: apply=true weight=1
    IKMarkerTask RAMC: apply=true weight=0.5
    IKMarkerTask RScap_IA: apply=true weight=0.5
    IKMarkerTask RScap_TS: apply=true weight=0.5
    IKMarkerTask LAMC: apply=true weight=0.5
    IKMarkerTask LScap_IA: apply=true weight=0.5
    IKMarkerTask LScap_TS: apply=true weight=0.5
    IKMarkerTask RHum_EL: apply=true weight=1
    IKMarkerTask RHum_EM: apply=true weight=1
    IKMarkerTask RElb_Cent: apply=true weight=1
    IKMarkerTask LHum_EL: apply=true weight=1
    IKMarkerTask LHum_EM: apply=true weight=1
    IKMarkerTask LElb_Cent: apply=true weight=1
    IKMarkerTask RArm_RS: apply=true weight=1
    IKMarkerTask RArm_US: apply=true weight=1
    IKMarkerTask RWrist_Cent: apply=true weight=1
    IKMarkerTask LArm_RS: apply=true weight=1
    IKMarkerTask LArm_US: apply=true weight=1
    IKMarkerTask LWrist_Cent: apply=true weight=1
    IKMarkerTask RHand_C: apply=true weight=1
    IKMarkerTask RHand_L: apply=true weight=1
    IKMarkerTask RHand_P: apply=true weight=1
    IKMarkerTask LHand_C: apply=true weight=1
    IKMarkerTask LHand_L: apply=true weight=1
    IKMarkerTask LHand_P: apply=true weight=1
    IKMarkerTask Head1: apply=true weight=1
    IKMarkerTask Head2: apply=true weight=1
    IKMarkerTask Head3: apply=true weight=1
    IKMarkerTask Head4: apply=true weight=1
    IKCoordinateTask [values shared by the 8 below unless stated]: apply=true weight=0.0001 value_type=manual_value
    IKCoordinateTask scapula_abduction: value=-0.3115611
    IKCoordinateTask scapula_elevation: value=-0.05049787
    IKCoordinateTask scapula_upward_rot: weight=0.0002 value=0.2082049
    IKCoordinateTask scapula_winging: value=0
    IKCoordinateTask Lscapula_abduction: value=-3.453154
    IKCoordinateTask Lscapula_elevation: value=0.05049787
    IKCoordinateTask Lscapula_upward_rot: weight=0.0002 value=2.933388
    IKCoordinateTask Lscapula_winging: value=3.141593
