# OpenSim document version 40000
InverseKinematicsTool:
  time_range: 0 2.94
  output_motion_file: C:\Users\ibrah\OneDrive - KTH\PhD-Scripts\RMR Solver\rmr-solver\Results\Upright_Lateral_Raise_90.mot
  marker_file: C:\Users\ibrah\OneDrive - KTH\PhD-Scripts\RMR Solver\rmr-solver\ExperimentalData\Upright_Lateral_Raise_90.trc
  report_marker_locations: true
  IKTaskSet:
    IKMarkerTask ij: apply=true weight=1
    IKMarkerTask ai: apply=true weight=0.5
    IKMarkerTask ts: apply=true weight=0.5
    IKMarkerTask aa: apply=true weight=0.5
    IKMarkerTask gu: apply=true weight=1
    IKMarkerTask EpL: apply=true weight=1
    IKMarkerTask centelbow: apply=true weight=1
    IKMarkerTask centijc7: apply=true weight=1
    IKMarkerTask centpxt8: apply=true weight=1
    IKCoordinateTask [values shared by the 8 below unless stated]: apply=true weight=0.0001 value_type=manual_value
    IKCoordinateTask scapula_abduction: value=-0.3115611
    IKCoordinateTask scapula_elevation: value=-0.05049787
    IKCoordinateTask scapula_upward_rot: weight=0.0002 value=0.2082049
    IKCoordinateTask scapula_winging: value=0
    IKCoordinateTask Lscapula_abduction: value=-3.453154
    IKCoordinateTask Lscapula_elevation: value=0.05049787
    IKCoordinateTask Lscapula_upward_rot: weight=0.0002 value=2.933388
    IKCoordinateTask Lscapula_winging: value=3.141593
